aS := 0.00001
aR := 0.0001
aG := 0.1
SNR := 0.1
Given
aS + aR == aG
aS^2*1/sqrt(2)/(aR^2*1/sqrt(3)) == SNR
[aS; aR] := Find(aS, aR)
aS = 0.022224
aR = 0.077776
(aG - aR)^2*sqrt(3) == SNR*aR^2*sqrt(2)
[
    aG*(6^(1/4)*sqrt(SNR) - sqrt(3))/(sqrt(2)*SNR - sqrt(3));
    -aG*(6^(1/4)*sqrt(SNR) + sqrt(3))/(sqrt(2)*SNR - sqrt(3))
]
aS + aR = 0.1
f(SNR) := aG*(6^(1/4)*sqrt(SNR) - sqrt(3))/(sqrt(2)*SNR - sqrt(3))
aS^2*1/sqrt(2)/(aR^2*1/sqrt(3)) = 0.1
SNR := 0.0001 .. 0.01 .. 10  # error: Dieser Wert muss eine reelle Zahl sein.
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Given
a^2*sqrt(3)/sqrt(2) - 2*a*aR*sqrt(3)/sqrt(2) + aR^2*(sqrt(3)/sqrt(2) - SN) == 0
Find(aR) → [sqrt(2)*a*(6^(1/4)*sqrt(SN) - sqrt(3))/(2*(SN - sqrt(2)*sqrt(3)/2)), -sqrt(2)*a*(6^(1/4)*sqrt(SN) + sqrt(3))/(2*(SN - sqrt(2)*sqrt(3)/2))]
aR := sqrt(2)*aG*(6^(1/4)*sqrt(SNR) - sqrt(3))/(2*(SNR - sqrt(2)*sqrt(3)/2))  # error: Diese Variable ist nicht definiert.
aR =  # error: Diese Variable ist nicht definiert.
aS := aG - aR  # error: Diese Variable ist nicht definiert.
aS =  # error
