# Conversion of SNR from dB to linear percent
SNR := -40 .. 40
# definition of SNR:
P(SNR) := 10^(SNR/10)
aS := 1
aR := 1
Given
aS/aR*nthroot(3/2, 4) == sqrt(P(SNR))  # definition of SNR
aS + aR == 1  # assumption for defining linear percent
[aS(SNR); aR(SNR)] := Find(aS, aR)
# Conversion:
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